<neuroml xmlns="http://www.neuroml.org/schema/neuroml2"  xmlns:xs="http://www.w3.org/2001/XMLSchema" xmlns:xsi="http://www.w3.org/2001/XMLSchema-instance" xsi:schemaLocation="http://www.neuroml.org/schema/neuroml2 https://raw.github.com/NeuroML/NeuroML2/development/Schemas/NeuroML2/NeuroML_v2beta5.xsd" id="ISN">
    <notes>Generated network</notes>
    <EIF_cond_alpha_isfa_ista id="eifcell" cm="0.12" i_offset="0." tau_syn_E="2." tau_syn_I="10." v_init="-70.599999999999994" tau_m="16.800000000000001" tau_refrac="2." v_reset="-60." v_rest="-70." v_thresh="-50." e_rev_E="-10." e_rev_I="-80." a="0." b="0." delta_T="2." tau_w="144." v_spike="0."/>
    <alphaCondSynapse id="ampa" tau_syn="2." e_rev="-10."/>
    <alphaCondSynapse id="gaba" tau_syn="10." e_rev="-80."/>
    <SpikeSourcePoisson id="ssp_pre" start="0.0ms" duration="650.0ms" rate="9600.0Hz"/>
    <network id="ISN">
        <notes>Based on network of Sadeh et al. 2017</notes>
        <population id="Epop" component="eifcell" size="80" type="populationList">
            <property tag="region" value="ISN_network"/>
            <instance id="0">
                <location x="966.453535692138757" y="44.073259917535268" z="7.491470058587191"/>
            </instance>
            <instance id="1">
                <location x="910.975962449124154" y="93.926899736376399" z="582.227573058949133"/>
            </instance>
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        </population>
        <population id="Ipop" component="eifcell" size="20" type="populationList">
            <property tag="region" value="ISN_network"/>
            <instance id="0">
                <location x="162.534292623261678" y="49.94160285960556" z="940.048073796692506"/>
            </instance>
            <instance id="1">
                <location x="950.182698605339851" y="13.993868140764443" z="532.313783635430127"/>
            </instance>
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        </population>
        <population id="Background_pre" component="ssp_pre" size="80" type="populationList">
            <property tag="region" value="ISN_network"/>
            <instance id="0">
                <location x="913.98817002680596" y="46.80477258678539" z="597.759736545583337"/>
            </instance>
            <instance id="1">
                <location x="371.792311134986335" y="39.665422147662134" z="778.4075093855663"/>
            </instance>
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        </population>
        <projection id="projBkgPre" presynapticPopulation="Background_pre" postsynapticPopulation="Epop" synapse="ampa">
            <connectionWD id="0" preCellId="../Background_pre/0/ssp_pre" postCellId="../Epop/0/eifcell" weight="0.0001" delay="2ms"/>
            <connectionWD id="1" preCellId="../Background_pre/1/ssp_pre" postCellId="../Epop/1/eifcell" weight="0.0001" delay="2ms"/>
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        </projection>
        <projection id="projEe" presynapticPopulation="Epop" postsynapticPopulation="Epop" synapse="ampa">
            <connectionWD id="0" preCellId="../Epop/0/eifcell" postCellId="../Epop/12/eifcell" weight="0.0004" delay="2ms"/>
            <connectionWD id="1" preCellId="../Epop/0/eifcell" postCellId="../Epop/24/eifcell" weight="0.0004" delay="2ms"/>
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        </projection>
        <projection id="projEI" presynapticPopulation="Epop" postsynapticPopulation="Ipop" synapse="ampa">
            <connectionWD id="0" preCellId="../Epop/1/eifcell" postCellId="../Ipop/16/eifcell" weight="0.0004" delay="2ms"/>
            <connectionWD id="1" preCellId="../Epop/1/eifcell" postCellId="../Ipop/17/eifcell" weight="0.0004" delay="2ms"/>
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        </projection>
        <projection id="projIE" presynapticPopulation="Ipop" postsynapticPopulation="Epop" synapse="gaba">
            <connectionWD id="0" preCellId="../Ipop/0/eifcell" postCellId="../Epop/0/eifcell" weight="0.0005" delay="2ms"/>
            <connectionWD id="1" preCellId="../Ipop/0/eifcell" postCellId="../Epop/1/eifcell" weight="0.0005" delay="2ms"/>
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        </projection>
        <projection id="projII" presynapticPopulation="Ipop" postsynapticPopulation="Ipop" synapse="gaba">
            <connectionWD id="0" preCellId="../Ipop/0/eifcell" postCellId="../Ipop/0/eifcell" weight="0.0005" delay="2ms"/>
            <connectionWD id="1" preCellId="../Ipop/0/eifcell" postCellId="../Ipop/1/eifcell" weight="0.0005" delay="2ms"/>
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        </projection>
    </network>
</neuroml>
