<Lems>

    <!--

        This LEMS file has been automatically generated using PyNeuroML v0.7.6 (libNeuroML v0.4.2)

     -->

    <!-- Specify which component to run -->
    <Target component="SimISN" reportFile="report.SimISN.txt"/>

    <!-- Include core NeuroML2 ComponentType definitions -->
    <Include file="Cells.xml"/>
    <Include file="Networks.xml"/>
    <Include file="Simulation.xml"/>

    <Include file="PyNN.xml"/>
    <Include file="ISN.net.nml"/>

    <Simulation id="SimISN" length="1000.0ms" step="0.025ms" target="ISN" seed="5678">  <!-- Note seed: ensures same random numbers used every run -->

        <Display id="Epop_v" title="Plots of Epop_v" timeScale="1ms" xmin="-100.0" xmax="1100.0" ymin="-80" ymax="40">
            <Line id="Epop_0_eifcell_v" quantity="Epop/0/eifcell/v" scale="1mV" color="#d54f33" timeScale="1ms"/>
            <Line id="Epop_1_eifcell_v" quantity="Epop/1/eifcell/v" scale="1mV" color="#0534e4" timeScale="1ms"/>
            <Line id="Epop_2_eifcell_v" quantity="Epop/2/eifcell/v" scale="1mV" color="#98e752" timeScale="1ms"/>
            <Line id="Epop_3_eifcell_v" quantity="Epop/3/eifcell/v" scale="1mV" color="#bca074" timeScale="1ms"/>
            <Line id="Epop_4_eifcell_v" quantity="Epop/4/eifcell/v" scale="1mV" color="#632794" timeScale="1ms"/>
            <Line id="Epop_5_eifcell_v" quantity="Epop/5/eifcell/v" scale="1mV" color="#8a5d88" timeScale="1ms"/>
            <Line id="Epop_6_eifcell_v" quantity="Epop/6/eifcell/v" scale="1mV" color="#df5954" timeScale="1ms"/>
            <Line id="Epop_7_eifcell_v" quantity="Epop/7/eifcell/v" scale="1mV" color="#52c8bf" timeScale="1ms"/>
        </Display>

        <Display id="Ipop_v" title="Plots of Ipop_v" timeScale="1ms" xmin="-100.0" xmax="1100.0" ymin="-80" ymax="40">
            <Line id="Ipop_0_eifcell_v" quantity="Ipop/0/eifcell/v" scale="1mV" color="#bf0239" timeScale="1ms"/>
            <Line id="Ipop_1_eifcell_v" quantity="Ipop/1/eifcell/v" scale="1mV" color="#3f9fe8" timeScale="1ms"/>
        </Display>

        <OutputFile id="SimISN_Epop_v_dat" fileName="SimISN.Epop.v.dat">
            <OutputColumn id="Epop_0_eifcell_v" quantity="Epop/0/eifcell/v"/>
            <OutputColumn id="Epop_1_eifcell_v" quantity="Epop/1/eifcell/v"/>
            <OutputColumn id="Epop_2_eifcell_v" quantity="Epop/2/eifcell/v"/>
            <OutputColumn id="Epop_3_eifcell_v" quantity="Epop/3/eifcell/v"/>
            <OutputColumn id="Epop_4_eifcell_v" quantity="Epop/4/eifcell/v"/>
            <OutputColumn id="Epop_5_eifcell_v" quantity="Epop/5/eifcell/v"/>
            <OutputColumn id="Epop_6_eifcell_v" quantity="Epop/6/eifcell/v"/>
            <OutputColumn id="Epop_7_eifcell_v" quantity="Epop/7/eifcell/v"/>
        </OutputFile>

        <OutputFile id="SimISN_Ipop_v_dat" fileName="SimISN.Ipop.v.dat">
            <OutputColumn id="Ipop_0_eifcell_v" quantity="Ipop/0/eifcell/v"/>
            <OutputColumn id="Ipop_1_eifcell_v" quantity="Ipop/1/eifcell/v"/>
        </OutputFile>

    </Simulation>

</Lems>
